Simulations: Version=206
  DataStore
  Folder
    Experiment
      Factors
        Permutation
          Factor V
            CompositeFactor 1
              Specifications:
                [Sowing].Script.SowDate = 19-Jun
                [Sowing].Script.EmergeDate = 23-Jun
            CompositeFactor 2
              Specifications:
                [Sowing].Script.SowDate = 24-Apr
                [Sowing].Script.EmergeDate = 21-Jun
          Factor Cv: Specification=[Sowing].Script.CultivarName=Axe,Bolac,Calingiri
          Factor N: Specification=[NSchedule]
            Operations 0
              1990-06-21  [Fertiliser].Apply(amount: 0, type: "UreaN");
            Operations 200
              1990-06-21  [Fertiliser].Apply(amount: 200, type: "UreaN");
      Simulation
        Clock: Start=1990-04-23; End=1991-04-15
        Weather: FileName=example.met
        Summary SummaryFile
        SoilArbitrator
        Zone Field: Area=1; Slope=0; AspectAngle=0; Altitude=50
          Report HarvestReport: EventNames=[Wheat].Harvesting
            VariableNames:
              [Clock].Today
              [Wheat].Phenology.Stage
              [Wheat].Phenology.Zadok.Stage
              [Wheat].Phenology.FloweringDAS
              [Wheat].Phenology.FlagLeafDAS
              [Wheat].Phenology.TerminalSpikeletDAS
          Fertiliser
          Soil: ASCOrder=Vertosol; ASCSubOrder=Black; SoilType=Clay; Site=Norwin; NearestTown=Norwin; Region=Darling Downs and Granite Belt; State=Queensland; Country=Australia; NaturalVegetation=Qld. Bluegrass, possible Qld. Blue gum; ApsoilNumber=900; Latitude=-27.5818; Longitude=151.3202; LocationAccuracy=+/- 20m
            DataSource=CSIRO Sustainable Ecosystems, Toowoomba; Characteriesd as part of the GRDC funded project"Doing it better, doing it smarter, managing soil water in Australian agriculture' 2011
            Comments=OC, CLL for all crops estimated-based on Bongeen Mywybilla Soil No1
            Physical
              Thickness  ParticleSizeSand  ParticleSizeSilt  ParticleSizeClay  Rocks  BD      AirDry  LL15    DUL     SAT     KS
              150        5                 65                30                0      1.0106  0.1303  0.2605  0.521   0.5887  20
              150        5                 65                30                0      1.0715  0.1987  0.2484  0.4967  0.5657  20
              300        5                 65                30                0      1.0939  0.28    0.28    0.4884  0.5572  20
              300        5                 65                30                0      1.1586  0.28    0.28    0.4803  0.5328  20
              300        5                 65                30                0      1.173   0.28    0.28    0.4716  0.5274  20
              300        5                 65                30                0      1.1629  0.28    0.28    0.4571  0.5312  20
              300        5                 65                30                0      1.1875  0.28    0.28    0.4523  0.5219  20
              Rocks, ParticleSizeSand, ParticleSizeSilt, ParticleSizeClay source: Calculated
              SoilCrop WheatSoil: LL=[0.261, 0.248, 0.28, 0.306, 0.36, 0.392, 0.446]; KL=[0.06, 0.06, 0.06, 0.04, 0.04, 0.02, 0.01]; XF=[1, 1, 1, 1, 1, 1, 1]
            WaterBalance SoilWater: SummerDate=1-Nov; SummerU=5; SummerCona=5; WinterDate=1-Apr; WinterU=5; WinterCona=5; DiffusConst=40; DiffusSlope=16; Salb=0.12; CN2Bare=73; CNRed=20; CNCov=0.8; PSIDul=-100; Thickness=[150, 150, 300, 300, 300, 300, 300]; SWCON=[0.3, 0.3, 0.3, 0.3, 0.3, 0.3, 0.3]
            Organic: FOMCNRatio=40; CarbonUnits=Total
              Thickness  Carbon  SoilCNRatio  FBiom  FInert  FOM
              150        1.2     12           0.04   0.4     347.129
              150        0.96    12           0.02   0.6     270.3444
              300        0.6     12           0.02   0.8     163.9721
              300        0.3     12           0.02   1       99.4541
              300        0.18    12           0.01   1       60.322
              300        0.12    12           0.01   1       36.5871
              300        0.12    12           0.01   1       22.1912
            Chemical: PHUnits=Water
              Thickness  PH  CEC
              150        8   11.045
              150        8   10.505
              300        8   9.695
              300        8   9.02
              300        8   8.75
              300        8   8.615
              300        8   8.615
              CEC source: Calculated
            Water: Thickness=[150, 150, 300, 300, 300, 300, 300]; InitialValues=[0.521, 0.4967, 0.4884, 0.4803, 0.4716, 0.4571, 0.4523]; FilledFromTop=false
            Nutrient
            Solute NO3: Thickness=[150, 150, 300, 300, 300, 300, 300]; InitialValues=[1, 1, 1, 1, 1, 1, 1]; InitialValuesUnits=ppm; WaterTableConcentration=0; D0=0; DepthConstant=0; MaxDepthSoluteAccessible=0; RunoffEffectivenessAtMovingSolute=0; MaxEffectiveRunoff=0
            Solute NH4: Thickness=[150, 150, 300, 300, 300, 300, 300]; InitialValues=[0.1, 0.1, 0.1, 0.1, 0.1, 0.1, 0.1]; InitialValuesUnits=ppm; WaterTableConcentration=0; D0=0; DepthConstant=0; MaxDepthSoluteAccessible=0; RunoffEffectivenessAtMovingSolute=0; MaxEffectiveRunoff=0
            Solute Urea: Thickness=[150, 150, 300, 300, 300, 300, 300]; InitialValues=[0, 0, 0, 0, 0, 0, 0]; InitialValuesUnits=kg/ha; WaterTableConcentration=0; D0=0; DepthConstant=0; MaxDepthSoluteAccessible=0; RunoffEffectivenessAtMovingSolute=0; MaxEffectiveRunoff=0
            SoilTemperature Temperature
          SurfaceOrganicMatter: InitialResidueName=wheat_stubble; InitialResidueType=wheat; InitialResidueMass=500; InitialStandingFraction=0; InitialCPR=0; InitialCNR=100
          Plant Wheat
          MicroClimate: a_interception=0; b_interception=1; c_interception=0; d_interception=0; SoilHeatFluxFraction=0.4; MinimumHeightDiffForNewLayer=0; NightInterceptionFraction=0.5; ReferenceHeight=2
          Manager SowingFertiliser
            Amount = 300
            CropName = wheat
```csharp
using Models.Soils;
using System;
using Models.Core;
using Models.PMF;
namespace Models
{
    [Serializable]
    public class Script : Model
    {
        [Link] Clock Clock;
        [Link] Fertiliser Fertiliser;
        [Link] Summary Summary;
        
        
        [Description("Amount of fertiliser to be applied (kg/ha)")]
        public double Amount { get; set;}
        
        [Description("Crop to be fertilised")]
        public string CropName { get; set;}
        
        
        

        [EventSubscribe("Sowing")]
        private void OnSowing(object sender, EventArgs e)
        {
            Model crop = sender as Model;
            if (crop.Name.ToLower()==CropName.ToLower())
                Fertiliser.Apply(amount: Amount, type: "NO3N");
        }
        
    }
}
```
          Manager Harvest
```csharp
using APSIM.Shared.Utilities;
using Models.Utilities;
using Models.Soils;
using Models.PMF;
using Models.Core;
using System;

namespace Models
{
    [Serializable]
    public class Script : Model
    {
        [Link] Plant Wheat;

        [EventSubscribe("DoManagement")]
        private void OnDoManagement(object sender, EventArgs e)
        {
            if (Wheat.IsReadyForHarvesting)
            {
               Wheat.Harvest();
               Wheat.EndCrop();    
            }
        
        }
        
    }
}
```
          Manager Sowing
            SowDate = 5-May
            EmergeDate =
            CultivarName = Hartog
            SowingDepth = 30
            RowSpacing = 250
            Population = 150
```csharp
using Models.Soils.Nutrients;
using System;
using Models.Core;
using Models.PMF;
using Models.Soils;
using Models.Soils.Nutrients;
using Models.Utilities;
using APSIM.Shared.Utilities;

namespace Models
{
    [Serializable]
    public class Script : Model
    {
        [Link] Clock Clock;
        [Link] Fertiliser Fertiliser;
        [Link] Summary Summary;
        [Link] Plant Wheat;
        [Link] Soil Soil;
        Accumulator accumulatedRain;
        
        [Description("Sowing date (d-mmm)")]
        public string SowDate { get; set; }
        [Description("Emergence date (d-mmm)")]
        public string EmergeDate { get; set; }
        [Description("Cultivar to be sown")]
        public string CultivarName { get; set; }
        [Description("Sowing depth (mm)")]
        public double SowingDepth { get; set; }
        [Description("Row spacing (mm)")]
        public double RowSpacing { get; set; }
        [Description("Plant population (/m2)")]
        public double Population { get; set; }
        
        


        [EventSubscribe("DoManagement")]
        private void OnDoManagement(object sender, EventArgs e)
        {
        
            
            if (DateUtilities.WithinDates(SowDate, Clock.Today, SowDate))
            {
                Wheat.Sow(population: Population, cultivar: CultivarName, depth: SowingDepth, rowSpacing: RowSpacing);    
                Wheat.Phenology.SetPhaseCompletionDate(EmergeDate,"Emerging");
            }
        
        }
        
    }
}
```
          Operations NSchedule
